// COMSOL Multiphysics 5.2.0.220 model "Parts.mph"
// Outline of the model tree

Parameters
  q1 = 67.62
  q2 = -142.9

Geometry
  geom1 "Geometry 1" (3D, length unit m)
    imp1: Import | filename = C:\Users\galax\Desktop\Hanyang\3-2\CAE\Project\Robot_Arm_2Links\Parts.CATProduct
    rot1: Rotate | input = imp1.Product1Part3_1Part3Part3PartBodyPad_2; rot = q1; axistype = y
    rot2: Rotate | input = imp1.Product1Part4_1Part4Part4PartBodyPocket_1; rot = q1+q2; axistype = y
    fin: Finalize "Form Union"

Physics
  solid: SolidMechanics on all domains
    dependent variable u = {u, v, w}
    lemm1: LinearElasticModel "Linear Elastic Material 1" (default)
      E_mat = userdef
      E = 70e9
      nu_mat = userdef
      nu = 0.33
      rho_mat = userdef
      rho = 2700
    free1: Free (default)
    init1: init "Initial Values 1" (default)
    fix1: Fixed "Fixed Constraint 1" on boundaries 34
    bndl1: BoundaryLoad on boundaries 1 | LoadType = TotalForce; Ftot = {0, 0, -11428.65}

Mesh
  mesh1 "Mesh 1"
    size: MeshSizeDefault | hauto = 4
    ftet1: FreeTet "Free Tetrahedral 1" on remaining entities

Studies
  std1 "Study 1"
    stat: Stationary

Solver configurations
  sol1 "Solution 1" (study std1)
    v1: Variables "Dependent Variables 1"
    s1: Stationary "Stationary Solver 1"
      dDef: Direct
      fc1: FullyCoupled | linsolver = dDef; termonres = auto; reserrfact = 1000

Datasets
  dset1: Solution | solution = sol1

Derived values
  pev1: EvalPoint "Point Evaluation 1" on points 23, 48 | data = dset1; table = tbl1; expr = solid.mises

Tables
  tbl1: Table
    // Point Evaluation 1 (solid.mises)
    von Mises stress (N/m^2), Point: 23 | von Mises stress (N/m^2), Point: 48
    5793.33 | 2.21635e+07

Plots
  pg1: PlotGroup3D "Stress (solid)" | data = dset1
    surf1: Surface | expr = solid.mises; wireframe = off
      def: Deform "Deformation" | expr = {u, v, w}